*Heading
** Job name: sprain Model name: ankle_model
** Generated by: Abaqus/CAE 2021
*Preprint, echo=NO, model=NO, history=NO, contact=NO
** ----------------------------------------------------------------
**
** PART INSTANCE: talus
**
*System
    -1.1e-05,      -7e-06,   -6.062668,    0.999989,      -7e-06,   -6.062668
*Node
  70000,     -16.2493,   29.6315994,   2.59649992
  70001,     -16.2493,   19.1088009,   2.59649992
  70002,     -16.2493,   19.1088009,           0.
  70003,     -16.2493,   29.6315994,           0.
  70004,   -36.053299,   19.1088009,   2.59649992
  70005,   -36.053299,   19.1088009,           0.
*Element, type=S4R
70000, 70000, 70001, 70002, 70003
70001, 70001, 70004, 70005, 70002
70002, 70004, 70000, 70003, 70005
*Element, type=S3
70003, 70001, 70000, 70004
70004, 70005, 70003, 70002
*Node
  70006,   -36.053299,   19.1088009,   2.59649992
*Nset, nset=talus-RefPt_
70006,
*Nset, nset=talus_RP
 70006,
*Elset, elset=talus_elements, generate
 70000,  70004,      1
** Section: simple_shell
*Shell Section, elset=talus_elements, material=bone
1., 5
** ----------------------------------------------------------------
**
** PART INSTANCE: smooth_shank_STL
**
*System
*Node
      1,  -96.3364334,   125.498619,  -4.76004505
      2,  -96.0891495,   125.498619,  0.229763016
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*Element, type=S3
   1,    1,    2,    3
   2,    1,    5,    6
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*Node
   9019,  -55.0940514,   125.498619,  -3.95073891
*Nset, nset=smooth_shank_STL-RefPt_
9019,
*Nset, nset=smooth_shank_STL_RP
 9019,
*Nset, nset=smooth_shank_STL_nodes
    1,    2,    3,    5,    6,   11
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*Elset, elset=smooth_shank_STL_elements
    1,    2,    3,    4,    5,    6
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*Elset, elset=_smooth_shank_STL_surf_SPOS
    2,    3,    6,    8,   10,   11
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*Surface, type=ELEMENT, name=smooth_shank_STL_surf
_smooth_shank_STL_surf_SPOS, SPOS
** Section: simple_shell
*Shell Section, elset=smooth_shank_STL_elements, material=bone
1., 5
** ----------------------------------------------------------------
**
** PART INSTANCE: smooth_anklemorph_STL
**
*Node
  40000,  -89.1870651,  -27.0688171,   -2.0712719
  40001,  -88.6698303,  -24.0950184,   1.29028296
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*Element, type=SFM3D3
40000, 40000, 40001, 40002
40001, 40000, 40002, 40003
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*Nset, nset=smooth_anklemorph_STL_nodes, generate
 40000,  40786,      1
*Elset, elset=smooth_anklemorph_STL_elements, generate
 40000,  41412,      1
*Elset, elset=_smooth_anklemorph_STL_surf_SPOS, generate
 40000,  41412,      1
*Surface, type=ELEMENT, name=smooth_anklemorph_STL_surf
_smooth_anklemorph_STL_surf_SPOS, SPOS
** Section: surface
*Surface Section, elset=smooth_anklemorph_STL_elements, density=1e-09
** ----------------------------------------------------------------
**
** PART INSTANCE: smooth_foot_STL
**
*Node
  30000,  -91.0320969,  -43.2856789, -0.538065016
  30001,  -90.9315109,   -49.052845, -0.268187016
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*Element, type=S3
30000, 30000, 30001, 30002
30001, 30000, 30003, 30004
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*Node
  32272,  -87.0954971,  -24.7957001,   4.82280016
*Nset, nset=smooth_foot_STL-RefPt_
32272,
*Nset, nset=smooth_foot_STL_RP
 32272,
*Nset, nset=smooth_foot_STL_nodes, generate
 30000,  32271,      1
*Elset, elset=smooth_foot_STL_elements, generate
 30000,  34454,      1
*Elset, elset=_smooth_foot_STL_surf_SPOS, generate
 30000,  34454,      1
*Surface, type=ELEMENT, name=smooth_foot_STL_surf
_smooth_foot_STL_surf_SPOS, SPOS
** Section: simple_shell
*Shell Section, elset=smooth_foot_STL_elements, material=bone
1., 5
*System
*Node
   9020,  -40.0044212,   12.5611849,   33.3734627
*Node
   9021,  -32.1021996,   25.6564007,  -40.3058014
*Element, type=CONN3D2
70005, 9020, 70006
*Connector Section, elset=talocrural_axis, behavior=hinge_talocrural
Hinge,
CSYS_talocrural,
*Element, type=CONN3D2
70006, 70003, 32272
*Connector Section, elset=subtalar_axis, behavior=hinge_subtalar
Hinge,
CSYS_subtalar,
*Elset, elset="Bottom Ring"
 40000, 40001, 40002, 40003, 40008, 40009
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*Nset, nset=LM
9020,
*Nset, nset=Node
 40634,
*Nset, nset=RPshank
 9019,
*Nset, nset=subtalar_axis
 70003,
*Nset, nset=subtalar_axis
 32272,
*Elset, elset=subtalar_axis
 70006,
*Nset, nset=talocrural_axis
9020,
*Nset, nset=talocrural_axis
 70006,
*Elset, elset=talocrural_axis
 70005,
*Elset, elset="_Foot 1_"
 32297,
*Surface, type=ELEMENT, name="Foot 1"
"_Foot 1_",
*Elset, elset="_Foot 2_"
 31177,
*Surface, type=ELEMENT, name="Foot 2"
"_Foot 2_",
*Elset, elset=_Foot3_
 30835,
*Surface, type=ELEMENT, name=Foot3
_Foot3_,
*Elset, elset="_Morph 1_"
 41397,
*Surface, type=ELEMENT, name="Morph 1"
"_Morph 1_",
*Elset, elset="_Morph 2_"
 40782,
*Surface, type=ELEMENT, name="Morph 2"
"_Morph 2_",
*Elset, elset="_Morph 3_"
 40623,
*Surface, type=ELEMENT, name="Morph 3"
"_Morph 3_",
*Elset, elset=_Surf-7_
 40593,
*Surface, type=ELEMENT, name=Surf-7
_Surf-7_,
*Orientation, name=CSYS_talocrural
-0.105012881909991, -0.174022789974694, 0.97912632647804, -0.018557796506232, 0.984741625285244, 0.173030458646476
1, 0.
*Orientation, name=CSYS_subtalar
0.787179579781257, 0.6047474710654, -0.120949598657485, -0.597732956660301, 0.796417287758122, 0.0918412558828124
1, 0.
** Constraint: Constraint-4
*Tie, name=Constraint-4, adjust=no, position tolerance=1.
"Morph 1", "Foot 1"
** Constraint: Test2
*Tie, name=Test2, adjust=no, position tolerance=1.
"Morph 2", "Foot 2"
** Constraint: Test3
*Tie, name=Test3, adjust=no, position tolerance=1.
"Morph 3", Foot3
** Constraint: rigid_foot
*Rigid Body, ref node=smooth_foot_STL_RP, elset=smooth_foot_STL_elements
** Constraint: rigid_shank
*Rigid Body, ref node=smooth_shank_STL_RP, elset=smooth_shank_STL_elements
** Constraint: rigid_talus
*Rigid Body, ref node=talus_RP, elset=talus_elements
*Connector Behavior, name=hinge_talocrural
*Connector Elasticity, nonlinear, component=4
  -30562.,    -1.0472
 -26965.7,   -1.03133
 -23799.2,   -1.01546
 -21011.2,  -0.999598
 -18556.3,  -0.983731
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    1e+07,    1.06465
*Connector Behavior, name=hinge_subtalar
*Connector Elasticity, nonlinear, component=4
   -1e+06,   -0.453786
 -8218.92,   -0.226893
 -6817.45,   -0.218431
 -5651.79,   -0.209968
 -4682.27,   -0.201506
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  343195.,    0.610865
*Amplitude, name=UAMP1, definition=USER, variables=1
*Amplitude, name=amp_dorsiflexion
             0.,              1.,          0.0101,           0.998,          0.0202,           0.992,          0.0303,          0.9819
         0.0404,          0.9679,          0.0505,          0.9501,          0.0606,          0.9284,          0.0707,          0.9029
         0.0808,          0.8738,          0.0909,          0.8413,           0.101,          0.8053,          0.1111,           0.766
         0.1212,          0.7237,          0.1313,          0.6785,          0.1414,          0.6306,          0.1515,          0.5801
         0.1616,          0.5272,          0.1717,          0.4723,          0.1818,          0.4154,          0.1919,          0.3569
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         0.9697,          0.9819,          0.9798,           0.992,          0.9899,           0.998,              1.,              1.
*Amplitude, name=amp_supination
             0.,              0.,          0.0101,          0.0634,          0.0202,          0.1266,          0.0303,          0.1893
         0.0404,          0.2511,          0.0505,           0.312,          0.0606,          0.3717,          0.0707,          0.4298
         0.0808,          0.4862,          0.0909,          0.5406,           0.101,          0.5929,          0.1111,          0.6428
         0.1212,          0.6901,          0.1313,          0.7346,          0.1414,          0.7761,          0.1515,          0.8146
         0.1616,          0.8497,          0.1717,          0.8815,          0.1818,          0.9096,          0.1919,          0.9341
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         0.9697,         -0.1893,          0.9798,         -0.1266,          0.9899,         -0.0634,              1.,             -0.
*Amplitude, name=ramp_0
             0.,              0.,              1.,              0.
*Amplitude, name=ramp_1
             0.,              0.,              1.,              1.
**
** MATERIALS
**
*Material, name=bone
*Elastic
1000., 0.4
*Material, name=foam
*Elastic
25., 0.4
*Material, name=polymer
*Density
 1e-09,
*Hyperelastic, marlow, moduli=INSTANTANEOUS, poisson=0.49
*Uniaxial Test Data
    0.,   0.
  2.31, 0.01
  3.47, 0.02
  4.57, 0.03
  5.43, 0.04
  6.13, 0.05
  6.76, 0.06
  7.28, 0.07
  7.76, 0.08
  8.42,  0.1
  9.36, 0.13
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  49.5,  2.3
*Viscoelastic, time=RELAXATION TEST DATA
*Shear Test Data
     1.,  0.1
  0.999,  0.2
 0.9985,  0.3
 0.9978,  0.4
 0.9971,  0.5
 0.9961,  0.6
 0.9952,  0.7
 0.9937,  0.8
 0.9927,  0.9
 0.9918,   1.
  0.984,   2.
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 0.7899,2000.
**
** INTERACTION PROPERTIES
**
*Surface Interaction, name=IntProp-1
1.,
*Friction, slip tolerance=0.005
 0.1,
*Surface Behavior, pressure-overclosure=LINEAR
100.,
** ----------------------------------------------------------------
**
** STEP: defined_pose
**
*Step, name=defined_pose, nlgeom=YES, inc=5000
*Static, stabilize, factor=0.0002, allsdtol=0, continue=NO
1e-05, 1., 1e-05, 0.1
**
** BOUNDARY CONDITIONS
**
** Name: fix_LM Type: Displacement/Rotation
*Boundary
LM, 1, 1
LM, 2, 2
LM, 3, 3
LM, 4, 4
LM, 5, 5
LM, 6, 6
** Name: fix_shank Type: Displacement/Rotation
*Boundary
RPshank, 1, 1
RPshank, 2, 2
RPshank, 3, 3
RPshank, 4, 4
RPshank, 5, 5
RPshank, 6, 6
**
*include, input=morph_include_20dfx_30sup_bcs.inc
**
** OUTPUT REQUESTS
**
*Restart, write, frequency=0
**
** FIELD OUTPUT: F-Output-1
**
*Output, field, variable=PRESELECT
**
** HISTORY OUTPUT: Node Movement
**
*Output, history
*Node Output, nset=Node
U1, U2, U3, UR1, UR2, UR3
**
** HISTORY OUTPUT: Subtalar_Rotation
**
*Output, history, sensor, name=Subtalar_Rotation
*Element Output, elset=subtalar_axis
CUR1,
**
** HISTORY OUTPUT: Talocrural_Rotation
**
*Output, history, sensor, name=Talocrural_Rotation
*Element Output, elset=talocrural_axis
CUR1,
*End Step
